// SBML level 2 version 1

model Smolen2002()
  // Smolen2002_CircClock
  // This model originates from BioModels Database: A Database of Annotated Published Models. It is copyright (c) 2005-2009 The BioModels Team.
  // For more information see the terms of use.
  // To cite BioModels Database, please use Le Novère N., Bornstein B., Broicher A., Courtot M., Donizelli M., Dharuri H., Li L., Sauro H., Schilstra M., Shapiro B., Snoep J.L., Hucka M. (2006) BioModels Database: A Free, Centralized Database of Curated, Published, Quantitative Kinetic Models of Biochemical and Cellular Systems Nucleic Acids Res., 34: D689-D691.
  // biomodels.db:BIOMD0000000025
  // isDescribedBy pubmed:12414672
  // isVersionOf GO:0007623
  // taxonomy:7227 kegg.pathway:dme04710

  // Compartments:
  compartment CELL = 1000e-18;  // GO:0005623

  // Species:
  species $EmptySet in CELL = 0;
  species Per in CELL = 500e-18/CELL;  // uniprot:P07663
  species dClk in CELL = 100e-18/CELL;  // hasPart uniprot:O61735 uniprot:P07663
  species dClkF in CELL = 0; dClkF is "free dClk";  // uniprot:O61735

  // Reactions:
  rPer: $EmptySet -> Per; rPer_V*delay(dClkF/(rPer_K + dClkF), parameter_0000008)*CELL; rPer is "Per production";  // modifiers: dClkF; isVersionOf GO:0043037
    rPer_V = 0.5; rPer_K = 0.3; parameter_0000008 = 10;
  rdClk: $EmptySet -> dClk; CELL*rdClk_V*delay(rdClk_K/(rdClk_K + dClkF), parameter_0000009); rdClk is "dClk production";  // modifiers: dClkF; isVersionOf GO:0043037
    rdClk_V = 0.25; rdClk_K = 0.1; parameter_0000009 = 10;
  rPerD: Per -> $EmptySet; rPerD_D*Per*CELL; rPerD is "Per degradation";  // isVersionOf GO:0030163
    rPerD_D = 0.5;
  rdClkD: dClk -> $EmptySet; rdClkD_D*dClk*CELL; rdClkD is "dClk degradation";  // isVersionOf GO:0030163
    rdClkD_D = 0.5;

  // Events:
  at (dClk - Per < 0): dClkF = 0;
  at (dClk - Per >= 0): dClkF = dClk - Per;

  // Unit definitions:
  unit time = 3600 second; time is "hour (new default)";
  unit substance = 1e-9 mole; substance is "nanomole (new default)";
end
