// SBML level 3 version 1

model and(Cell, CI, Degradation_CI, GFP, Degradation_GFP, LacI, Degradation_LacI, TetR, Degradation_TetR)

  // Compartments:
  compartment Cell = 1;

  // Species:
  substanceOnly species CI in Cell = 0;
  substanceOnly species GFP in Cell = 0;
  substanceOnly species $LacI in Cell = 0;
  substanceOnly species $TetR in Cell = 0;
  substanceOnly species Promoter_GFP in Cell = 2;
  substanceOnly species P1 in Cell = 4;
  substanceOnly species P3 in Cell = 2;
  substanceOnly species P3_mRNA in Cell = 0;
  substanceOnly species P2 in Cell = 2;

  // Parameters:
  ko_r = 1; ko_r is "Reverse RNAP binding rate";
  nr = 30; nr is "Initial RNAP count";
  np = 10; np is "Stoichiometry of production";
  kr_r = 1; kr_r is "Reverse repression binding rate";
  ka_f = 0.0033; ka_f is "Forward activation binding rate";
  kecdiff = 1; kecdiff is "Extracellular diffusion rate";
  ko = 0.05; ko is "Open complex production rate";
  kmdiff_f = 1; kmdiff_f is "Forward membrane diffusion rate";
  kecd = 0.005; kecd is "Extracellular degradation rate";
  kc_r = 1; kc_r is "Reverse complex formation rate";
  kr_f = 0.5; kr_f is "Forward repression binding rate";
  ka_r = 1; ka_r is "Reverse activation binding rate";
  nc = 2; nc is "Stoichiometry of binding";
  kao_r = 1; kao_r is "Reverse activated RNAP binding rate";
  kd = 0.0075; kd is "Degradation rate";
  kb = 0.0001; kb is "Basal production rate";
  ng = 2; ng is "Initial promoter count";
  ka = 0.255; ka is "Activated production rate";
  kao_f = 1; kao_f is "Forward activated RNAP binding rate";
  kmdiff_r = 0.01; kmdiff_r is "Reverse membrane diffusion rate";
  ko_f = 0.033; ko_f is "Forward RNAP binding rate";
  kc_f = 0.05; kc_f is "Forward complex formation rate";
  High = 60;
  HighTime = 2000;
  HighTime2 = 4000;

  // Reactions:
  Degradation_CI: CI => ; kd*CI;
  Degradation_GFP: GFP => ; kd*GFP;
  Degradation_LacI: $LacI => ; kd*LacI;
  Degradation_TetR: $TetR => ; kd*TetR;
  Production_Promoter_GFP: => 10 GFP; Promoter_GFP*ko*(ko_f/ko_r)*nr/(1 + ko_f/ko_r*nr + (kr_f/kr_r*CI)^nc_CI_r);  // modifiers: Promoter_GFP, CI
    nc_CI_r = 3;
  Production_P1: => 10 CI; P1*ko*(ko_f/ko_r)*nr/(1 + ko_f/ko_r*nr + (kr_f/kr_r*LacI)^nc);  // modifiers: P1, LacI
  Production_P3: => 10 P3_mRNA; P3*ko*(ko_f/ko_r)*nr/(1 + ko_f/ko_r*nr);  // modifiers: P3
  Production_P2: => 10 CI; P2*ko*(ko_f/ko_r)*nr/(1 + ko_f/ko_r*nr + (kr_f/kr_r*TetR)^nc);  // modifiers: P2, TetR

  // Events:
  event0: at (time >= HighTime), persistent=false: TetR = High;
  event1: at (time >= HighTime2), persistent=false: LacI = High;
end
