// SBML level 3 version 1

model toggleSwitch()

  // Compartments:
  compartment Cell_Interior = 1;
  compartment Exterior = 1;

  // Species:
  substanceOnly species LacI in Cell_Interior = 0;
  substanceOnly species IPTG in Cell_Interior = 0;
  substanceOnly species IPTG_LacI in Cell_Interior = 0;
  substanceOnly species TetR in Cell_Interior = 0;
  substanceOnly species aTc in Cell_Interior = 0;
  substanceOnly species aTc_TetR in Cell_Interior = 0;
  substanceOnly species aTc_ext in Exterior = 0;
  substanceOnly species TetR_ext in Exterior = 0;
  substanceOnly species LacI_ext in Exterior = 0;
  substanceOnly species IPTG_ext in Exterior = 0;
  substanceOnly species P0 in Cell_Interior = 2;
  substanceOnly species P1 in Cell_Interior = 2;

  // Parameters:
  kc_f = 0.05; kc_f is "Forward complex formation rate";
  kc_r = 1; kc_r is "Reverse complex formation rate";
  nc = 2; nc is "Stoichiometry of binding";
  kr_f = 0.5; kr_f is "Forward repression binding rate";
  kr_r = 1; kr_r is "Reverse repression binding rate";
  ka_f = 0.0033; ka_f is "Forward activation binding rate";
  ka_r = 1; ka_r is "Reverse activation binding rate";
  ko_f = 0.033; ko_f is "Forward RNAP binding rate";
  ko_r = 1; ko_r is "Reverse RNAP binding rate";
  kao_f = 1; kao_f is "Forward activated RNAP binding rate";
  kao_r = 1; kao_r is "Reverse activated RNAP binding rate";
  nr = 30; nr is "Initial RNAP count";
  ko = 0.05; ko is "Open complex production rate";
  kb = 0.0001; kb is "Basal production rate";
  ng = 2; ng is "Initial promoter count";
  np = 10; np is "Stoichiometry of production";
  ka = 0.25; ka is "Activated production rate";
  n = 2;
  m = 1;
  kd = 0.0075; kd is "Degradation rate";
  k_diff_in = 0.1;
  k_diff_out = 0.01;
  k_move = 1;

  // Reactions:
  R5: LacI_ext -> LacI_ext; k_move*selector(LacI_ext, d1, d0) - k_move*selector(LacI_ext, d1, d0 + 1);
  R7: IPTG_ext -> IPTG_ext; k_move*selector(IPTG_ext, d1, d0) - k_move*selector(IPTG_ext, d1, d0 + 1);
  Complex_aTc_TetR: aTc + TetR -> aTc_TetR; kc_f*selector(aTc, d1, d0)^nc_aTc*selector(TetR, d1, d0)^nc_TetR - kc_r*selector(aTc_TetR, d1, d0);
    nc_aTc = 1; nc_TetR = 1;
  Complex_IPTG_LacI: LacI + IPTG -> IPTG_LacI; kc_f*selector(LacI, d1, d0)^nc_LacI*selector(IPTG, d1, d0)^nc_IPTG - kc_r*selector(IPTG_LacI, d1, d0);
    nc_LacI = 1; nc_IPTG = 1;
  Production_P0: => 10 TetR; selector(P0, d1, d0)*ko*(ko_f/ko_r)*nr/(1 + ko_f/ko_r*nr + (kr_f/kr_r*selector(LacI, d1, d0))^nc);  // modifiers: P0, LacI
  Production_P1: => 10 LacI; selector(P1, d1, d0)*ko*(ko_f/ko_r)*nr/(1 + ko_f/ko_r*nr + (kr_f/kr_r*selector(TetR, d1, d0))^nc);  // modifiers: P1, TetR
  Degradation_TetR: TetR => ; kd*selector(TetR, d1, d0);
  Degradation_LacI: LacI => ; kd*selector(LacI, d1, d0);
  Degradation_IPTG: IPTG => ; Degradation_IPTG_kd*selector(IPTG, d1, d0);
    Degradation_IPTG_kd = 0.00075;
  R1: aTc_ext -> aTc_ext; k_move*selector(aTc_ext, d1, d0) - k_move*selector(aTc_ext, d1, d0 + 1);
  Degradation_aTc: aTc => ; Degradation_aTc_kd*selector(aTc, d1, d0);
    Degradation_aTc_kd = 0.00075;
  R0: aTc_ext -> aTc_ext; k_move*selector(aTc_ext, d1, d0) - k_move*selector(aTc_ext, d1 + 1, d0);
  IPTG_diffusion: IPTG -> IPTG_ext; k_diff_out*selector(IPTG, d1, d0) - k_diff_in*selector(IPTG_ext, d1, d0);
  R4: LacI_ext -> LacI_ext; k_diff_in*selector(LacI_ext, d1, d0) - k_diff_out*selector(LacI_ext, d1 + 1, d0);
  R6: IPTG_ext -> IPTG_ext; k_diff_in*selector(IPTG_ext, d1, d0) - k_diff_out*selector(IPTG_ext, d1 + 1, d0);
  TetR_diffusion: TetR -> TetR_ext; k_diff_out*selector(TetR, d1, d0) - k_diff_in*selector(TetR_ext, d1, d0);
  R3: TetR_ext -> TetR_ext; k_move*selector(TetR_ext, d1, d0) - k_move*selector(TetR_ext, d1, d0 + 1);
  R2: TetR_ext -> TetR_ext; k_move*selector(TetR_ext, d1, d0) - k_move*selector(TetR_ext, d1 + 1, d0);
  LacI_diff: LacI -> LacI_ext; k_diff_out*selector(LacI, d1, d0) - k_diff_in*selector(LacI_ext, d1, d0);
  aTc_diffusion: aTc -> aTc_ext; k_diff_out*selector(aTc, d1, d0) - k_diff_in*selector(aTc_ext, d1, d0);
end
